<?xml version="1.0"?>
<!--
    This is the JSBSim config file for a PA34-200T SenecaII.
    The aerodynamics sections was generated by datcom using
    as much real input as available.

    Changes from datcom.xml

    - function attribute NAME must be lowercase
    - missing function Delta_lift_due_to_flap_deflection in axis LIFT
    - missing function Lift_due_to_Elevator_Deflection in axis LIFT
-->
<?xml-stylesheet href="JSBSim.xsl" type="application/xml"?>
<fdm_config xmlns:xsi="http://www.w3.org/2001/XMLSchema-instance"
    xsi:noNamespaceSchemaLocation="file:/home/torsten/FlightGear/Aircraft/SenecaII/JSBSim.xsd"
    name="easystar" version="2.0" release="BETA">

    <fileheader>
        <author>James Goppert</author>
        <filecreationdate>2010-6-3</filecreationdate>
        <description>Multiplex Easy Star JSBSim Flight Dynamics Model</description>
        <reference title="Multiplex Easy Star JSBSim Flight Dynamics Model"/>
    </fileheader>

    <output name="easystar_datalog.csv" rate="60" type="CSV">
        <property> aero/qbar-psf </property>
        <property> attitude/phi-rad </property>
        <property> position/h-sl-ft </property>
        <property> velocities/vc-kts </property>
        <property> fcs/throttle-cmd-norm </property>
        <property> fcs/elevator-pos-norm </property>
        <rates> ON </rates>
        <velocities> ON </velocities>
        <forces> ON </forces>
        <moments> ON </moments>
        <position> ON </position>
        <propulsion> OFF </propulsion>
        <aerosurfaces> OFF </aerosurfaces>
        <fcs> OFF </fcs>
        <ground_reactions> ON </ground_reactions>
    </output>

    <!-- **********************************************************************
        METRICS
        ********************************************************************** -->
	 <metrics>
   <wingarea  unit="FT2">    3.01 </wingarea>
   <wingspan  unit="FT" >    4.59 </wingspan>
   <wing_incidence>          2.00 </wing_incidence>
   <chord     unit="FT" >    0.66 </chord>
   <htailarea unit="FT2">    0.48 </htailarea>
   <htailarm  unit="FT" >    1.71 </htailarm>
   <vtailarea unit="FT2">    0.30 </vtailarea>
   <vtailarm  unit="FT" >    1.64 </vtailarm>
   <location name="AERORP" unit="IN">
     <x>  18.90 </x>
     <y>   0.00 </y>
     <z>   0.00 </z>
   </location>
   <location name="EYEPOINT" unit="IN">
     <x>   5.12 </x>
     <y> -18.00 </y>
     <z>  45.00 </z>
   </location>
   <location name="VRP" unit="IN">
     <x>0</x>
     <y>0</y>
     <z>0</z>
   </location>
 </metrics>

    <!-- **********************************************************************
        MASS_BALANCE
        ********************************************************************** -->
     <mass_balance>
   <ixx unit="SLUG*FT2">         0.1 </ixx>
   <iyy unit="SLUG*FT2">         0.1 </iyy>
   <izz unit="SLUG*FT2">         0.1 </izz>
   <emptywt unit="LBS" >         3 </emptywt>
   <location name="CG" unit="IN">
     <x>  18.90 </x>
     <y>   0.00 </y>
     <z>  -0.98 </z>
   </location>
   <pointmass name="Payload">
    <description>  7 LBS + full ( 2 LBS) fuel should bring model up to entered max weight</description>
    <weight unit="LBS">      3.3 </weight>
    <location name="POINTMASS" unit="IN">
      <x>  18.90 </x>
      <y>   0.00 </y>
      <z>  -0.98 </z>
    </location>
  </pointmass>
 </mass_balance>
    <!-- **********************************************************************
        UNDERCARRIAGE
        ********************************************************************** -->
   <ground_reactions>

  <contact type="BOGEY" name="LEFT_MAIN">
   <location unit="IN">
     <x>  17.20 </x>
     <y>  -4.96 </y>
     <z>  -7.87 </z>
   </location>
   <static_friction>  0.80 </static_friction>
   <dynamic_friction> 0.50 </dynamic_friction>
   <rolling_friction> 0.02 </rolling_friction>
   <spring_coeff unit="LBS/FT">         11.03 </spring_coeff>
   <damping_coeff unit="LBS/FT/SEC">     5.51 </damping_coeff>
   <max_steer unit="DEG">0</max_steer>
   <brake_group>LEFT</brake_group>
   <retractable>0</retractable>
  </contact>

  <contact type="BOGEY" name="RIGHT_MAIN">
   <location unit="IN">
     <x>  17.20 </x>
     <y>   4.96 </y>
     <z>  -7.87 </z>
   </location>
   <static_friction>  0.80 </static_friction>
   <dynamic_friction> 0.50 </dynamic_friction>
   <rolling_friction> 0.02 </rolling_friction>
   <spring_coeff unit="LBS/FT">         11.03 </spring_coeff>
   <damping_coeff unit="LBS/FT/SEC">     5.51 </damping_coeff>
   <max_steer unit="DEG">0</max_steer>
   <brake_group>RIGHT</brake_group>
   <retractable>0</retractable>
  </contact>

  <contact type="BOGEY" name="TAIL">
   <location unit="IN">
     <x>  35.83 </x>
     <y>   0.00 </y>
     <z>  -2.36 </z>
   </location>
   <static_friction>  0.80 </static_friction>
   <dynamic_friction> 0.50 </dynamic_friction>
   <rolling_friction> 0.02 </rolling_friction>
   <spring_coeff unit="LBS/FT">         11.03 </spring_coeff>
   <damping_coeff unit="LBS/FT/SEC">     5.51 </damping_coeff>
   <max_steer unit="DEG"> 360.00 </max_steer>
   <brake_group>NONE</brake_group>
   <retractable>0</retractable>
  </contact>

  <contact type="STRUCTURE" name="LEFT_WING">
    <location unit="IN">
     <x>  18.90 </x>
     <y>  -2.30 </y>
     <z>  -0.98 </z>
    </location>
    <static_friction>  1.00 </static_friction>
    <dynamic_friction> 1.00 </dynamic_friction>
    <spring_coeff unit="LBS/FT">         11.03 </spring_coeff>
    <damping_coeff unit="LBS/FT/SEC">    11.03 </damping_coeff>
  </contact>

  <contact type="STRUCTURE" name="RIGHT_WING">
    <location unit="IN">
     <x>  18.90 </x>
     <y>   2.30 </y>
     <z>  -0.98 </z>
    </location>
    <static_friction>  1.00 </static_friction>
    <dynamic_friction> 1.00 </dynamic_friction>
    <spring_coeff unit="LBS/FT">         11.03 </spring_coeff>
    <damping_coeff unit="LBS/FT/SEC">    11.03 </damping_coeff>
  </contact>

 </ground_reactions>
    <!-- **********************************************************************
        PROPULSION
        ********************************************************************** -->
   <propulsion>


 <engine file="engine_winddrone">
    <location unit="IN">
      <x>  18.90 </x>
      <y>   0.00 </y>
      <z> -12.00 </z>
    </location>
    <orient unit="DEG">
      <pitch> 0.00 </pitch>
      <roll>  0.00 </roll>
      <yaw>   0.00 </yaw>
    </orient>
    <feed>0</feed>
    <thruster file="christoph">
     <location unit="IN">
       <x>  18.90 </x>
       <y>   0.00 </y>
       <z> -12.00 </z>
     </location>
     <orient unit="DEG">
       <pitch> 0.00 </pitch>
       <roll>  0.00 </roll>
       <yaw>   0.00 </yaw>
     </orient>
    </thruster>
  </engine>

  <tank type="FUEL" number="0">
     <location unit="IN">
       <x>  18.90 </x>
       <y>   0.00 </y>
       <z>  -0.98 </z>
     </location>
     <capacity unit="LBS">   0.82 </capacity>
     <contents unit="LBS">   0.41 </contents>
  </tank>

  <tank type="FUEL" number="1">
     <location unit="IN">
       <x>  18.90 </x>
       <y>   0.00 </y>
       <z>  -0.98 </z>
     </location>
     <capacity unit="LBS">   0.82 </capacity>
     <contents unit="LBS">   0.41 </contents>
  </tank>


    </propulsion>
    <!-- **********************************************************************
        FLIGHT CONTROLS
        ********************************************************************** -->
    <flight_control name="easystar">

    </flight_control>

<!--


  ****************** IMPORTANT NOTICES **********************

   This is an alpha version release of the DATCOM+ program for
   JSBSIM. Nothing, and I do mean NOTHING, as been checked to
   verify that the parameters, units, sign conventions, or
   basically anything else is correct. Your mileage may vary.

   ***********************************************************

   This file was generated by the USAF Digital DATCOM program.
   This file is considered an intermediary file in the
   DATCOM/JSBSim process. This file may be overwritten without
   warning, so any changes that you make in here may be lost.

   If you intend to use this file as it is and modify it, make
   sure that you take the necessary precautions to prevent it
   from being overwritten, like renaming it.


   ***********************************************************


   DISCLAIMER REQUIRED BY HQ USAF FOR PUBLIC RELEASE APPROVAL

   THIS SOFTWARE AND ANY ACCOMPANYING DOCUMENTATION
   IS RELEASED "AS IS".  THE U.S. GOVERNMENT MAKES NO
   WARRANTY OF ANY KIND, EXPRESS OR IMPLIED, CONCERNING
   THIS SOFTWARE AND ANY ACCOMPANYING DOCUMENTATION,
   INCLUDING, WITHOUT LIMITATION, ANY WARRANTIES OF
   MERCHANTABILITY OR FITNESS FOR A PARTICULAR PURPOSE.
   IN NO EVENT WILL THE U.S. GOVERNMENT BE LIABLE FOR ANY
   DAMAGES, INCLUDING LOST PROFITS, LOST SAVINGS OR OTHER
   INCIDENTAL OR CONSEQUENTIAL DAMAGES ARISING OUT OF THE
   USE, OR INABILITY TO USE, THIS SOFTWARE OR ANY
   ACCOMPANYING DOCUMENTATION, EVEN IF INFORMED IN ADVANCE
   OF THE POSSIBILITY OF SUCH DAMAGES.


   ***********************************************************
-->


<!-- **********************************************************************
        AERODYNAMICS
     **********************************************************************
-->


   <aerodynamics>

  <axis name="LIFT">

    <function name="aero/force/Lift_alpha">
      <description>Lift due to alpha</description>
      <product>
          <property>aero/qbar-psf</property>
          <property>metrics/Sw-sqft</property>
          <table>
            <independentVar lookup="row">aero/alpha-rad</independentVar>
            <tableData>
              -0.20 -0.750
               0.00  0.250
               0.23  1.400
               0.60  0.710
            </tableData>
          </table>
      </product>
    </function>

    <function name="aero/force/Lift_flap">
       <description>Delta Lift due to flaps</description>
       <product>
           <property>aero/qbar-psf</property>
           <property>metrics/Sw-sqft</property>
           <property>fcs/flap-pos-deg</property>
           <value> 0.01333 </value>
       </product>
    </function>

    <function name="aero/force/Lift_speedbrake">
       <description>Delta Lift due to speedbrake</description>
       <product>
           <property>aero/qbar-psf</property>
           <property>metrics/Sw-sqft</property>
           <property>fcs/speedbrake-pos-norm</property>
           <value>0</value>
       </product>
    </function>

    <function name="aero/force/Lift_elevator">
       <description>Lift due to Elevator Deflection</description>
       <product>
           <property>aero/qbar-psf</property>
           <property>metrics/Sw-sqft</property>
           <property>fcs/elevator-pos-rad</property>
           <value>0.2</value>
       </product>
    </function>

  </axis>

  <axis name="DRAG">

    <function name="aero/force/Drag_basic">
       <description>Drag at zero lift</description>
       <product>
          <property>aero/qbar-psf</property>
          <property>metrics/Sw-sqft</property>
          <table>
            <independentVar lookup="row">aero/alpha-rad</independentVar>
            <tableData>
             -1.57    1.500
             -0.26    0.036
              0.00    0.028
              0.26    0.036
              1.57    1.500
            </tableData>
          </table>
       </product>
    </function>

    <function name="aero/force/Drag_induced">
       <description>Induced drag</description>
         <product>
           <property>aero/qbar-psf</property>
           <property>metrics/Sw-sqft</property>
           <property>aero/cl-squared</property>
           <value>0.04</value>
         </product>
    </function>

    <function name="aero/force/Drag_mach">
       <description>Drag due to mach</description>
        <product>
          <property>aero/qbar-psf</property>
          <property>metrics/Sw-sqft</property>
          <table>
            <independentVar lookup="row">velocities/mach</independentVar>
            <tableData>
                0.00      0.000
                0.7      0.000
                1.10      0.023
                1.80      0.015
            </tableData>
          </table>
        </product>
    </function>

    <function name="aero/force/Drag_flap">
       <description>Drag due to flaps</description>
         <product>
           <property>aero/qbar-psf</property>
           <property>metrics/Sw-sqft</property>
           <property>fcs/flap-pos-deg</property>
           <value> 0.00100 </value>
         </product>
    </function>

    <function name="aero/force/Drag_speedbrake">
       <description>Drag due to speedbrakes</description>
         <product>
           <property>aero/qbar-psf</property>
           <property>metrics/Sw-sqft</property>
           <property>fcs/speedbrake-pos-norm</property>
           <value>0.028</value>
         </product>
    </function>

    <function name="aero/force/Drag_beta">
       <description>Drag due to sideslip</description>
       <product>
          <property>aero/qbar-psf</property>
          <property>metrics/Sw-sqft</property>
          <table>
            <independentVar lookup="row">aero/beta-rad</independentVar>
            <tableData>
              -1.57    1.230
              -0.26    0.050
               0.00    0.000
               0.26    0.050
               1.57    1.230
            </tableData>
          </table>
       </product>
    </function>

    <function name="aero/force/Drag_elevator">
       <description>Drag due to Elevator Deflection</description>
       <product>
           <property>aero/qbar-psf</property>
           <property>metrics/Sw-sqft</property>
           <abs><property>fcs/elevator-pos-norm</property></abs>
           <value>0.04</value>
       </product>
    </function>

  </axis>

  <axis name="SIDE">

    <function name="aero/force/Side_beta">
       <description>Side force due to beta</description>
       <product>
           <property>aero/qbar-psf</property>
           <property>metrics/Sw-sqft</property>
           <property>aero/beta-rad</property>
           <value>-1</value>
       </product>
    </function>

  </axis>

  <axis name="ROLL">

    <function name="aero/moment/Roll_beta">
       <description>Roll moment due to beta</description>
       <product>
           <property>aero/qbar-psf</property>
           <property>metrics/Sw-sqft</property>
           <property>metrics/bw-ft</property>
           <property>aero/beta-rad</property>
           <value>-0.1</value>
       </product>
    </function>

    <function name="aero/moment/Roll_damp">
       <description>Roll moment due to roll rate</description>
       <product>
           <property>aero/qbar-psf</property>
           <property>metrics/Sw-sqft</property>
           <property>metrics/bw-ft</property>
           <property>aero/bi2vel</property>
           <property>velocities/p-aero-rad_sec</property>
           <value>-0.4</value>
       </product>
    </function>

    <function name="aero/moment/Roll_yaw">
       <description>Roll moment due to yaw rate</description>
       <product>
           <property>aero/qbar-psf</property>
           <property>metrics/Sw-sqft</property>
           <property>metrics/bw-ft</property>
           <property>aero/bi2vel</property>
           <property>velocities/r-aero-rad_sec</property>
           <value>0.15</value>
       </product>
    </function>

    <function name="aero/moment/Roll_aileron">
       <description>Roll moment due to aileron</description>
       <product>
          <property>aero/qbar-psf</property>
          <property>metrics/Sw-sqft</property>
          <property>metrics/bw-ft</property>
          <property>fcs/left-aileron-pos-rad</property>
          <value>0.17</value>
       </product>
    </function>

    <function name="aero/moment/Roll_rudder">
       <description>Roll moment due to rudder</description>
       <product>
           <property>aero/qbar-psf</property>
           <property>metrics/Sw-sqft</property>
           <property>metrics/bw-ft</property>
           <property>fcs/rudder-pos-rad</property>
           <value>0.01</value>
       </product>
    </function>

  </axis>

  <axis name="PITCH">

    <function name="aero/moment/Pitch_alpha">
       <description>Pitch moment due to alpha</description>
       <product>
           <property>aero/qbar-psf</property>
           <property>metrics/Sw-sqft</property>
           <property>metrics/cbarw-ft</property>
           <property>aero/alpha-rad</property>
           <value>-0.5</value>
       </product>
    </function>

    <function name="aero/moment/Pitch_elevator">
       <description>Pitch moment due to elevator</description>
       <product>
          <property>aero/qbar-psf</property>
          <property>metrics/Sw-sqft</property>
          <property>metrics/cbarw-ft</property>
          <property>fcs/elevator-pos-rad</property>
          <table>
            <independentVar lookup="row">velocities/mach</independentVar>
            <tableData>
              0.0     -1.100
              2.0     -0.275
            </tableData>
          </table>
       </product>
    </function>

    <function name="aero/moment/Pitch_damp">
       <description>Pitch moment due to pitch rate</description>
       <product>
           <property>aero/qbar-psf</property>
           <property>metrics/Sw-sqft</property>
           <property>metrics/cbarw-ft</property>
           <property>aero/ci2vel</property>
           <property>velocities/q-aero-rad_sec</property>
           <value>-12</value>
       </product>
    </function>

    <function name="aero/moment/Pitch_alphadot">
       <description>Pitch moment due to alpha rate</description>
       <product>
           <property>aero/qbar-psf</property>
           <property>metrics/Sw-sqft</property>
           <property>metrics/cbarw-ft</property>
           <property>aero/ci2vel</property>
           <property>aero/alphadot-rad_sec</property>
           <value>-7</value>
       </product>
    </function>

  </axis>

  <axis name="YAW">

    <function name="aero/moment/Yaw_beta">
       <description>Yaw moment due to beta</description>
       <product>
           <property>aero/qbar-psf</property>
           <property>metrics/Sw-sqft</property>
           <property>metrics/bw-ft</property>
           <property>aero/beta-rad</property>
           <value>0.12</value>
       </product>
    </function>

    <function name="aero/moment/Yaw_damp">
       <description>Yaw moment due to yaw rate</description>
       <product>
           <property>aero/qbar-psf</property>
           <property>metrics/Sw-sqft</property>
           <property>metrics/bw-ft</property>
           <property>aero/bi2vel</property>
           <property>velocities/r-aero-rad_sec</property>
           <value>-0.15</value>
       </product>
    </function>

    <function name="aero/moment/Yaw_rudder">
       <description>Yaw moment due to rudder</description>
       <product>
           <property>aero/qbar-psf</property>
           <property>metrics/Sw-sqft</property>
           <property>metrics/bw-ft</property>
           <property>fcs/rudder-pos-rad</property>
           <value>-0.1</value>
       </product>
    </function>

    <function name="aero/moment/Yaw_aileron">
       <description>Adverse yaw</description>
       <product>
           <property>aero/qbar-psf</property>
           <property>metrics/Sw-sqft</property>
           <property>metrics/bw-ft</property>
           <property>fcs/left-aileron-pos-rad</property>
           <value>-0.01</value>
       </product>
    </function>

  </axis>

 </aerodynamics>
</fdm_config>
